#Simple chute wear test

clear
atom_style    granular
atom_modify   map array
boundary      f f f
newton        off

communicate   single vel yes

units         si

region        domain block -1.5 2.5 -1.5 2.5 -13.0 1.0 units box
create_box    1 domain

neighbor      0.2 bin
neigh_modify  delay 0


#Material properties required for new pair styles

fix  m1 all property/global youngsModulus peratomtype 5.e6
fix  m2 all property/global poissonsRatio peratomtype 0.45
fix  m3 all property/global coefficientRestitution peratomtypepair 1 0.3
fix  m4 all property/global coefficientFriction peratomtypepair 1 0.5
fix  m5 all property/global k_finnie peratomtypepair 1 1.0

#New pair style
pair_style  gran model hertz tangential history #Hertzian without cohesion
pair_coeff  * *

timestep    0.00001

fix  gravi all gravity 9.81 vector 0.0 0.0 -1.0

#the chute

fix cad     all mesh/surface/stress file meshes/GPBR_smooth_ascii_hollow.stl type 1
fix granwalls all wall/gran model hertz tangential history mesh n_meshes 1 meshes cad
fix  inface all mesh/surface file meshes/insertion_face.stl type 1

#distributions for insertion
#fix  pts1 all particletemplate/sphere 15485863 atom_type 1 density constant 2500 radius constant 0.0015
#fix  pts2 all particletemplate/sphere 15485867 atom_type 1 density constant 2500 radius constant 0.0025
#fix  pdd1 all particledistribution/discrete 32452843  2 pts1 0.3 pts2 0.7
fix  peb all particletemplate/sphere  15485863 atom_type 1 density constant 2000 radius constant 0.03
fix  pdd1 all particledistribution/discrete 32452843 1 peb 1.0

#region and insertion
group  nve_group region domain
region bc cylinder z 0.0 0.0 0.015 0.05 0.12 units box

#fix   plugwall all wall/gran model hertz tangential history primitive type 1 zplane -11.5
fix plugwall all wall/gran model hertz tangential history primitive type 1 zplane -0.899338

#particle insertion
#fix    ins nve_group insert/stream seed 32452867 distributiontemplate pdd1 nparticles 6000 massrate 24.6 insert_every 200 overlapcheck yes all_in no vel gaussian -2.5 2.5 -2.5 2.5 -15.0 -15.0 insertion_face inface
fix    ins nve_group insert/stream seed 32452867 distributiontemplate pdd1 nparticles 6000 massrate 24.6 insert_every 2500 overlapcheck yes all_in no vel constant 0 0 -5.0 insertion_face inface

#apply nve integration to all particles that are inserted as single particles
fix    integr nve_group nve/sphere

#output settings, include total thermal energy
compute       1 all erotate/sphere
thermo_style  custom step atoms ke c_1 vol
thermo        1000
thermo_modify lost ignore norm no

#insert the first particles so that dump is not empty
run    1
dump dmp all custom 200 post/chute.dat id type type x y z ix iy iz vx vy vz fx fy fz omegax omegay omegaz radius

#insert particles
run    160000 upto
unfix  ins

run 50000

write_restart restart/chute_final.rst

#unfix plugwall
#run 10000
